1.
3.4*(7.6 - 2.3)/1.5 + 23.1 = 35.1133
(1.2^3 + 2.3^2)*(sqrt(5.3) + (nthroot(18.5, 3) - 0.6)/(6.22 - 4.37)) = 23.9136
2.
# а)
a := 3
r := a/10*sqrt(5*(5 - 2*sqrt(5)))
r = 0.48738
# б)
n := 12
a1 := 1.2
a2 := 1.5
d := a2 - a1
d = 0.3
Sn := (2*a1 + (n - 1)*d)/2*n
Sn = 34.2
3.
a := 2
b := 4
g(a, b) := a^2 + b^2 + a*b*cos(atan(b/a))
g(a, b) = 23.5777
z := g(a, b)/(3*a) + 3.1*g(a, b)
z = 77.0205
4.
x := 2.1
y(x) := ln(sqrt(3*x^2 - 2.5))
y(x) = 1.18652
5.
s := integral(nthroot((x + 4)^2, 3), x = 0 .. 3)
s = 9.32146
6.
det([3, -1, 1; 0, 4, -2; 1, 2, -5]) = -50
7.
[3.3; -3.1; 2.9]*[1.7; 3.2; -5.0] = -18.81
