# Школьная математика
1.
f(x) := x^2 - 2*x
a_1 := 0
a_2 := 2
z_1 := root(f(a_1), a_1)
z_2 := root(f(a_2), a_2)
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z_1 = 0
z_2 = 2
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2.
y_1(x) := 2^|x| - 3*|x| + x
y_2(x) := sqrt(|x|) + 1
3.
x := 0
y := 0
z := 0
Given
x + y + 1/z == 1
x + 1/y + z == 1
1/x + y + z == 1
Find(x, y, z) → [
    -1, 1, 1, 1/4 + sqrt(7)*1i/4, 1/4 - sqrt(7)*1i/4;
    1, -1, 1, 1/4 + sqrt(7)*1i/4, 1/4 - sqrt(7)*1i/4;
    1, 1, -1, 1/4 + sqrt(7)*1i/4, 1/4 - sqrt(7)*1i/4
]
4.
d(x) := x^sin(x)
y(x) := |sin(x)|^x
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5.
4*z_1 + 1i*z_2 == -1i
3*z_1 - 2*z_2 == 7
Find(z_1, z_2) =  # error: Эта переменная не определена.
# Матричные операции
ORIGIN := 1
1.
i := 1 .. 5
A[i, i] := i
A = [1, 0, 0, 0, 0; 0, 2, 0, 0, 0; 0, 0, 3, 0, 0; 0, 0, 0, 4, 0; 0, 0, 0, 0, 5]
2.
ORIGIN := 1
a_1 := 1, 3 .. 5
j_1 := 2, 4 .. 4
k := 1 .. 7
B[a_1, k] := -2
B[j_1, k] := 1
B = [
    -2, -2, -2, -2, -2, -2, -2;
    1, 1, 1, 1, 1, 1, 1;
    -2, -2, -2, -2, -2, -2, -2;
    1, 1, 1, 1, 1, 1, 1;
    -2, -2, -2, -2, -2, -2, -2
]
3.
k_1 := 1, 3 .. 7
k_2 := 2, 4 .. 6
B[i, k_1] := B[i, k_1] + 2.2
B[i, k_2] := B[i, k_2] + 3.3
B = [
    0.2, 1.3, 0.2, 1.3, 0.2, 1.3, 0.2;
    3.2, 4.3, 3.2, 4.3, 3.2, 4.3, 3.2;
    0.2, 1.3, 0.2, 1.3, 0.2, 1.3, 0.2;
    3.2, 4.3, 3.2, 4.3, 3.2, 4.3, 3.2;
    0.2, 1.3, 0.2, 1.3, 0.2, 1.3, 0.2
]
4.
M := mean(B)
M = 1.87143
5.
B := B - M
B = [
    -1.67143, -0.571429, -1.67143, -0.571429, -1.67143, -0.571429, -1.67143;
    1.32857, 2.42857, 1.32857, 2.42857, 1.32857, 2.42857, 1.32857;
    -1.67143, -0.571429, -1.67143, -0.571429, -1.67143, -0.571429, -1.67143;
    1.32857, 2.42857, 1.32857, 2.42857, 1.32857, 2.42857, 1.32857;
    -1.67143, -0.571429, -1.67143, -0.571429, -1.67143, -0.571429, -1.67143
]
6.
A := augment(A, [1, 1; 1, 1; 1, 1; 1, 1; 1, 1])
A = [
    1, 0, 0, 0, 0, 1, 1;
    0, 2, 0, 0, 0, 1, 1;
    0, 0, 3, 0, 0, 1, 1;
    0, 0, 0, 4, 0, 1, 1;
    0, 0, 0, 0, 5, 1, 1
]
7.
C := A + B
C = [
    -0.671429, -0.571429, -1.67143, -0.571429, -1.67143, 0.428571, -0.671429;
    1.32857, 4.42857, 1.32857, 2.42857, 1.32857, 3.42857, 2.32857;
    -1.67143, -0.571429, 1.32857, -0.571429, -1.67143, 0.428571, -0.671429;
    1.32857, 2.42857, 1.32857, 6.42857, 1.32857, 3.42857, 2.32857;
    -1.67143, -0.571429, -1.67143, -0.571429, 3.32857, 0.428571, -0.671429
]
8.
D := C[:, 2]
D := augment(D, C[:, 3])
D := augment(D, C[:, 4])
D := augment(D, C[:, 5])
D := augment(D, C[:, 6])
D = [
    -0.571429, -1.67143, -0.571429, -1.67143, 0.428571;
    4.42857, 1.32857, 2.42857, 1.32857, 3.42857;
    -0.571429, 1.32857, -0.571429, -1.67143, 0.428571;
    2.42857, 1.32857, 6.42857, 1.32857, 3.42857;
    -0.571429, -1.67143, -0.571429, 3.32857, 0.428571
]
9.
D^-1 = [
    -0.0128, 0.22, -0.392, -0.14, -0.2352;
    -0.333333, 0, 0.333333, 0, 0;
    -0.0064, -0.14, -0.196, 0.18, -0.1176;
    -0.2, 0, 0, 0, 0.2;
    0.227733, 0.106667, 0.516, 0.0533333, 0.3096
]
10.
|D| = 321.429
# Линейная алгебра
[3, 1, 5; -7, 2, -4; 0, 5, 1]*[x; y; z] == [2; -3; -4]
A := [3, 1, 5; -7, 2, -4; 0, 5, 1]
B := [2; -3; -4]
[x; y; z] := A^-1*B
[x; y; z] = [-0.27451; -0.95098; 0.754902]
