1.
x_1 := 0.5
Y(x) := sin(x)/x
x :=
    x_1 ← 0.5
    eps ← 10^-3
    p ← x_1
    s ← x_1
    n ← 2
    while |p| > eps
        p ← (-p*x_1*x_1)/(n*(n + 1))
        s ← s + p
        n ← n + 2
Y(x) = -0.0465692
Y(x_1) = 0.958851
3.
V :=
    ORIGIN ← 1
    x ← 1
    for i ∈ 0 .. 9
        j ← 0
        V[i, j] ← rnd(x)
    "V="
    V
V = [0.573343; 0.548042; 0.311344; 0.808018; 0.284265; 0.895227; 0.743793; 0.361141; 0.228511; 0.229439]
csort(V, 0) = [0.228511; 0.229439; 0.284265; 0.311344; 0.361141; 0.548042; 0.573343; 0.743793; 0.808018; 0.895227]
2.
ORIGIN := 1
X :=
    x ← 1
    for i ∈ 1 .. 10
        for j ∈ 1 .. 10
            A[i, j] ← if(i == j, 0, rnd(x))
    transpose(A)
4.
x1 :=
    a ← 2
    b ← 4
    c ← -7
    sig1 ← 1
    sig2 ← -1
    d1 ← b^2 - 4*a*c
    d2 ← -b + sig1*sqrt(d1)
    d3 ← 2*a
    d2/d3
x2 :=
    a ← 2
    b ← 4
    c ← -7
    sig1 ← 1
    sig2 ← -1
    d1 ← b^2 - 4*a*c
    d4 ← -b + sig2*sqrt(d1)
    d3 ← 2*a
    d4/d3
X = [
    0, 0.0944042, 0.624778, 0.620382, 0.851219, 0.826689, 0.22709, 0.100635, 0.0278421, 0.340983;
    0.436683, 0, 0.565746, 0.804509, 0.154887, 0.873344, 0.919969, 0.863235, 0.0559277, 0.367574;
    0.577867, 0.93149, 0, 0.576046, 0.079348, 0.300078, 0.662784, 0.74733, 0.131648, 0.802393;
    0.628667, 0.894601, 0.184288, 0, 0.640986, 0.12723, 0.492535, 0.38012, 0.864307, 0.526538;
    0.504149, 0.227318, 0.555142, 0.911548, 0, 0.784959, 0.49682, 0.552806, 0.721645, 0.798184;
    0.695768, 0.410712, 0.242865, 0.727662, 0.545088, 0, 0.509258, 0.955708, 0.0146828, 0.144825;
    0.189952, 0.62807, 0.604727, 0.667785, 0.408975, 0.609648, 0, 0.176586, 0.707905, 0.402413;
    0.178375, 0.451613, 0.584605, 0.31502, 0.465561, 0.0722923, 0.688157, 0, 0.217562, 0.136562;
    0.457458, 0.597828, 0.494448, 0.305822, 0.152659, 0.653849, 0.606274, 0.131645, 0, 0.0661752;
    0.0975227, 0.854792, 0.740741, 0.108578, 0.737986, 0.104813, 0.00591149, 0.951709, 0.168934, 0
]
x1 = 1.12132
x2 = -3.12132
X = [
    0, 0.0944042, 0.624778, 0.620382, 0.851219, 0.826689, 0.22709, 0.100635, 0.0278421, 0.340983;
    0.436683, 0, 0.565746, 0.804509, 0.154887, 0.873344, 0.919969, 0.863235, 0.0559277, 0.367574;
    0.577867, 0.93149, 0, 0.576046, 0.079348, 0.300078, 0.662784, 0.74733, 0.131648, 0.802393;
    0.628667, 0.894601, 0.184288, 0, 0.640986, 0.12723, 0.492535, 0.38012, 0.864307, 0.526538;
    0.504149, 0.227318, 0.555142, 0.911548, 0, 0.784959, 0.49682, 0.552806, 0.721645, 0.798184;
    0.695768, 0.410712, 0.242865, 0.727662, 0.545088, 0, 0.509258, 0.955708, 0.0146828, 0.144825;
    0.189952, 0.62807, 0.604727, 0.667785, 0.408975, 0.609648, 0, 0.176586, 0.707905, 0.402413;
    0.178375, 0.451613, 0.584605, 0.31502, 0.465561, 0.0722923, 0.688157, 0, 0.217562, 0.136562;
    0.457458, 0.597828, 0.494448, 0.305822, 0.152659, 0.653849, 0.606274, 0.131645, 0, 0.0661752;
    0.0975227, 0.854792, 0.740741, 0.108578, 0.737986, 0.104813, 0.00591149, 0.951709, 0.168934, 0
]
